// SBML level 3 version 1

model main()
  // model units - substance: micromole, time: hour, extent: micromole

  // Compartments:
  compartment c = 1 litre;

  // Species:
  species A in c = 10/c;
  species B in c = 1/c;

  // Parameters:
  vmax_forward_pfk = 1 per_time;
  kcat_forward_pfk = 0 per_time;
  k_equilibrium_pfk = 1.5;
  km_substrate_pfk = 10;
  km_product_pfk = 10;
  vmax_backward_pfk = 0 per_time;
  total_enzyme_concentration_pfk = 0;
  k1_fwd_pfk = 0;
  k1_bwd_pfk = 0;
  k2_fwd_pfk = 0;
  k2_bwd_pfk = 0;

  // Reactions:
  pfk: B -> A; A*vmax_forward_pfk/(km_substrate_pfk*(A/km_substrate_pfk + B/km_product_pfk + 1)) - B*vmax_forward_pfk/(k_equilibrium_pfk*km_substrate_pfk*(A/km_substrate_pfk + B/km_product_pfk + 1));

  // Unit definitions:
  unit per_time = 1 / second;
end
